# лаба 3
# 1ое задание:----------------------------------------------------------------------------------------------
# 1ое подзадание:------------------------------------------------------------------------------------------
A := [1, 1, 0; 2, -2, 3; 4, 1, 3]
B := [1, 0, 0; 0, 1, 0; 0, 0, 1]
C := [-1, 3, 2; 1, 0, 4; 5, 7, 1]
D := A + (B + C)^-1*C = [2.44828, 0.862069, -0.172414; 1.68966, -0.827586, 2.96552; 3.96552, 0.741379, 4.05172]
# 2ое подзадание:------------------------------------------------------------------------------------------
b1 := [2, -2, 1]
b2 := [-1, -1, 7]
b3 := [1, -4, 2]
A1 := [2, -2, 1; -1, -1, 7; 1, -4, 2]
B1 := [4; 16; -3]
# метод обратной матрицы:------------------------------------------------------------------------------
A1^-1*B1 = [3.66667; 3.30769; 3.28205]
# метод крамера:-------------------------------------------------------------------------------------------
det_A := det(A1) = 39
x1 := det([4, -2, 1; 16, -1, 7; -3, -4, 2])/det_A = 3.66667
x2 := det([2, 4, 1; -1, 16, 7; 1, -3, 2])/det_A = 3.30769
x3 := det([2, -2, 4; -1, -1, 16; 1, -4, -3])/det_A = 3.28205
X := [x1; x2; x3] = [3.66667; 3.30769; 3.28205]
# метод lsolve():---------------------------------------------------------------------------------------------
lsolve(A1, B1) = [3.66667; 3.30769; 3.28205]
f(x) := A1*transpose(x)
# given:--------------------------------------------------------------------------------------------------------
solve block
    # guess values
    x := [1, 2, 3]
    # constraints
    f(x) == B1
    # solver
    transpose(find(x)) = [3.66667; 3.30769; 3.28205]
end solve block
# 3ее подзадание:------------------------------------------------------------------------------------------
W := [3, 2, 1]
V := [0; 2; 1]
B := [4, 2, 9, 1, 3; 2.6, 1.9, 0.4, 8, 3.7; 15, 6, 2.6, 5, 0]
A := [5, 8; 3, 4; 0, 0; 6, 1; 5, 8]
# ---------------------------------------------------------------------------------------------------------------
V*W = [0, 0, 0; 6, 4, 2; 3, 2, 1]
transpose(B)*V = [20.2; 9.8; 3.4; 21; 7.4]
W*V = 5
W*B = [32.2, 15.8, 30.4, 24, 16.4]
transpose(V)*B = [20.2, 9.8, 3.4, 21, 7.4]
B*A = [47, 65; 85.2, 66; 123, 149]
# 2ое задание:-----------------------------------------------------------------------------------------------
# 1ое подзадание:------------------------------------------------------------------------------------------
h1 := 0.5
r1 := 3
r2 := 6
f(x) := x^3/3*e^(-x^2)
mass(r1, r2, h1, f) :=
    x ← r1 + h1
    mass1 ← r1
    mass2 ← f(r1)
    while x ≤ r2
        mass1 ← stack(mass1, x)
        mass2 ← stack(mass2, f(x))
        x ← x + h1
    augment(mass1, mass2)
mass1 := mass(r1, r2, h1, f)
mass1 = [
    3, 0.00111069;
    3.5, 6.83873e-5;
    4, 2.40075e-6;
    4.5, 4.87588e-8;
    5, 5.78664e-10;
    5.5, 4.04165e-12;
    6, 0
]
# [plot: f(x), mass1[:, 1] vs x, mass1[:, 0]]
# 2ое подзадание:------------------------------------------------------------------------------------------
h1 := 0.2
r1 := -5
r2 := 5
f(x) := sin(x^2)
mass1 := mass(r1, r2, h1, f) = [
    -5, -0.132352;
    -4.8, -0.866851;
    -4.6, 0.738706;
    -4.4, 0.488565;
    -4.2, -0.935459;
    -4, -0.287903;
    -3.8, 0.954495;
    -3.6, 0.383543;
    -3.4, -0.844896;
    -3.2, -0.727878
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]
f(x) := sin(x^2)
# [plot: f(x), mass1[:, 1] vs x, mass1[:, 0]]
# 3ее задание:-----------------------------------------------------------------------------------------------
# 1ое подзадание:------------------------------------------------------------------------------------------
h1 := 1
r1 := -4
n := (r2 - r1)/h1 - 1 = 8
r2 := 4
f(x) := 1/(1 + x^2)
mass1 := mass(r1, r2, h1, f) = [-4, 0.0588235; -3, 0.1; -2, 0.2; -1, 0.5; 0, 1; 1, 0.5; 2, 0.2; 3, 0.1; 4, 0.0588235]
xt := mass1[:, 0]
yt := mass1[:, 1]
g(x) := sum(yt[i]*product(if(i ≠ j, (x - xt[j])/(xt[i] - xt[j]), 1), j = 0 .. n), i = 0 .. n)
s := cspline(xt, yt)
ls(zt) := interp(s, xt, yt, zt)
# [plot: g(x), ls(xt), f(x) vs x, xt]
