# 1-ая задание ----------------------------------------------------------------------------------------------
# 1)
f1(x) := integral(1/cos(4*x)^2, x)
f1(x) → tan(4*x)/4
# 2)
f2(x) := integral(1/5^(x/3), x)
f2(x) → -3/(ln(5)*5^(x/3))
# 3)
f3(x) := integral(sin(x/2)^2, x)
f3(x) → (-sin(x) + x)/2
# 4)
f4(x) := integral(1/(x^2 + 4), x)
f4(x) → atan(x/2)/2
# 2-ая задание ----------------------------------------------------------------------------------------------
integral(x^3, x = -1 .. 2) = 3.75
integral((2 + 5*x^(1/3))/x^3, x = 1 .. 8) = 3.89063
integral((x - 1)^(1/3), x = 2 .. 9) = 11.25
integral(1/cos(x)^2, x = -π/4 .. 0) = 1
# 3-ая----------------------------------------------------------------------------------------------------------
f(a, b, g) := integral(g(x), x = a .. b)/(b - a)
# А)
f1(x) := x^2
f(-1, 1, f1) = 0.333333
# Б)
f1(x) := sin(x)
f(0, π, f1) = 0.63662
# В)
f1(x) := 1/(1 + x^2)
f(-3, 5, f1) = 0.327806
# 4-ая----------------------------------------------------------------------------------------------------------
2*integral((8 - y^2)^(1/2) - y/2^(1/2), y = 0 .. 2) = 7.45476
# 5-ая----------------------------------------------------------------------------------------------------------
f(a, b, g) := integral((1 + g(x)^2)^(1/2), x = a .. b)
g1(x) := x^2
f(0, 4, g1') = 16.8186
g2(x) := sin(x)
f(0, 2*π, g2') = 7.6404
g3(x) := tan(x)
f(-1.5, 1.5, g3') = 28.8976
f(a, b) := [sin(a)*cos(b)*8^(1/2); sin(a)*sin(b)*8^(1/2); cos(a)*8^(1/2)]
a1 := 0
a2 := π
n1 := 18
b1 := 0
b2 := 2*π
n2 := 36
M := CreateMesh(f, a1, a2, b1, b2, n1, n2)
# [3D plot: M]
i := 0 .. 25
j := 0 .. 25
u[i] := i/25*π - π/2
v[j] := j*2*π/25
x[i, j] := 2*sin(v[j])*sin(u[i])
z[i, j] := 10^(1/2)*cos(v[j])
y[i, j] := 2^(1/2)*sin(v[j])*cos(u[i])
M := [x; y; z]
# [3D plot: M]
# 3)  Используя интегрирование, найти объем тела вращения
# - Найти объём тела, образованного вращением вокруг оси абсцисс (Ox) фигуры, ограниченной гиперболой y = 2/x и прямыми x = 1, x = 8;
π*integral((2/x)^2, x = 1 .. 8) = 10.9956
2*π*integral(2^2 - (1 - y)^2, y = 0 .. 1) = 23.0383
