# Лабораторная работа 1
# 1ое задание -----------------------------------------------------------------------------------------------
tan(π/4 + 1) - cos(π/8) = -5.51192
sqrt(1 + ln(1 + sin(π/4))) - 1 = 0.23887
# 2ое задание -----------------------------------------------------------------------------------------------
f1(x) := 2*sqrt(x^2 + 2*x - 2.75) - x - 3
f1(9) = 7.62142
T(x) := x^2 + 2*x - 2.75
v := T(x) coeffs → [-2.75; 2.0; 1.0]
u := polyroots(v) = [-2.93649; 0.936492]
x2 := -3
r2 := root(f1(x2), x2) = -2.93675
x1 := 1
r1 := root(f1(x1), x1) = 2.27008
# [plot: f1(x) vs x]
f2(x) := sqrt(3*x + 1) + sqrt(9 - x) - 6/sqrt(9 - x)
f2(1) = 2.70711
# [plot: f2(x) vs x]
x1 := 7
r1 := root(f2(x1), x1) = 8
# [plot: f2(x) vs x]
f3(x) := e^(-x^2) + e^(2*x) - 4
f3(24) = 7.01674e20
# [plot: f3(x) vs x]
x1 := 2
r1 := root(f3(x1), x1) = 0.596923
# [plot: f3(x) vs x]
f4(x) := log(log(x)) + log(log(x^3) - 2)
# [plot: f4(x) vs x]
f4({
    return 21
}) = 21
x1 := 9
r1 := root(f4(x1), x1) = 10
# [plot: f4(x) vs x]
f5(x) := nthroot((x + 1)/(x - 1), 3) + nthroot(2*x/(x^2 + 1), 3) - 1
# [plot: f5(x) vs x]
f5(7) = 0.754856
x1 := 10
r1 := root(f5(x1), x1) = 1.04714e22
# [plot: f5(x) vs x]
# 3ее задание -----------------------------------------------------------------------------------------------
f(x) := 0.2*x^5 - 4*x^3 + 12*x^2 - 9
p_roots := polyroots(v) = [-2.93649; 0.936492]
v := f(x) coeffs → [-9.0; 0.0; 12.0; -4.0; 0.0; 0.2]
# [plot: f(x), f(p_roots) vs x, p_roots]
f(x) := -6*x^4 + 18*x^2 - 3*x + 6
v2 := f(x) coeffs → [6; -3; 18; 0; -6]
p2_roots := polyroots(v2) = [-1.88345; 0.0696491 - 0.547323i; 0.0696491 + 0.547323i; 1.74415]
# [plot: f(x), f(p2_roots) vs x, p2_roots]
# 4ое задание -----------------------------------------------------------------------------------------------
solve block
    # guess values
    x := 1
    y := 1
    # constraints
    y^2 - x - 3*log(x) == 0
    5*x + x*y - 2*x^2 == 1
    # solver
    t := find(x, y) = [1.45889; -1.39677]
end solve block
T1(x, y) := y^2 - x - 3*log(x)
T1(t[0], t[1]) = -1.66533e-16
solve block
    # guess values
    x := 0
    y := 0
    # constraints
    sqrt(2*x - y + 11) - sqrt(3*x + y - 9) == 3
    nthroot(2*x - y + 11, 4) + nthroot(3*x + y - 9, 4) == 3
    # solver
    find(x, y) = [3; 1]
end solve block
