# 1ое задание -----------------------------------------------------------------------------------------------
# 1ое подзадание ------------------------------------------------------------------------------------------
f0(x) := -e^(x^2/3) - x/2
f0der1 := f0'  # Находим первую производную
r0 := root(f0der1(x), x, -2, 0) = -0.651151  # Считаем критическую точку
f0der2 := f0''  # Находим вторую производную
f0der2(r0) = -0.984922  # f'' от критической точки <0 соответственно это точка максимума
# [plot: f0(x), f0der1(x) vs x]
# 2ое подзадание ------------------------------------------------------------------------------------------
f1(x) := 0.5*x^5 - 2*x^4 + 3*x^3 - 7*x + 8
f1der1 := f1'  # Находим первую производную
r10 := root(f1der1(x), x, -2, 0) = -0.671931  # Считаем критическую точку
r11 := root(f1der1(x), x, 0, 2) = 1.63959  # Считаем критическую точку
f1der2 := f1''  # Находим вторую производную
# f'' от критической точки <0 соответственно это точка максимума
f1der2(r10) = -25.9643
# f'' от критической точки >0 соответственно это точка минимума
f1der2(r11) = 9.07086
# [plot: f1(x), f1der1(x) vs x]
# 3ее подзадание ------------------------------------------------------------------------------------------
f2(x) := x^3/3*e^(-x^2)
f2der1 := f2'  # Находим первую производную
r20 := root(f2der1(x), x, -2, -1) = -1.22474  # Считаем критическую точку
r21 := root(f2der1(x), x, 1, 2) = 1.22474  # Считаем критическую точку
f2der2 := f2''  # Находим вторую производную
f2der2(r20) = 0.546555  # f'' от критической точки <0 соответственно это точка минимума
f2der2(r21) = -0.546555  # f'' от критической точки <0 соответственно это точка максимума
# [plot: f2(x), f2der1(x) vs x]
# 4ое подзадание ------------------------------------------------------------------------------------------
f3(x) := nthroot(x^2/(1 + x^4), 3)
f3det1 := f3'  # Находим первую производную
r30 := root(f3det1(x), x, -2, -0.5) = -1  # Считаем критическую точку
r31 := root(f3det1(x), x, 0.5, 2) = 1  # Считаем критическую точку
f3det2 := f3''  # Находим вторую производную
f3det2(r30) = -1.05827  # f'' от критической точки <0 соответственно это точка максимума
f3det2(r31) = -1.05827  # f'' от критической точки <0 соответственно это точка максимума
# [plot: f3(x), f3det1(x) vs x]
# 2ое задание -----------------------------------------------------------------------------------------------
# 1ое подзадание ------------------------------------------------------------------------------------------
g11(x) := x/(x - 1)
f11(x) := g11(x) series, 3, x == 2 → 2 - (x - 2) + (x - 2)^2
# [plot: g11(x), f11(x) vs x]
# 2ое подзадание ------------------------------------------------------------------------------------------
g12(x) := asin(x)
f12(x) := g12(x) series, 6, x == 0 → x + 1/6*x^3 + 3/40*x^5
# [plot: g12(x), f12(x) vs x]
# 3ее подзадание ------------------------------------------------------------------------------------------
g22(x) := 1/sqrt(x)
f22(x) := g22(x) series, 4, x == 1 → 1 - 1/2*(x - 1) + 3/8*(x - 1)^2 - 5/16*(x - 1)^3
# [plot: g22(x), f22(x) vs x]
f22(1) = 1
